# [area: Исходное дано]
# Диаметр трубопровода  при 20С,мм | Межповерочный интервал ,г
τ_пп := 2
D_20 := 100
# Диаметр отверстия диафрагмы при 20С,мм | Материал Диафрагмы  -
d_20 := 69
# Местное сопротивление перед диафрагмой
# Струевыпрямитель
# Давление пара перед диафрагмой(абсолютное), МПа
# Длина прямолинейного  участка трубопровода перед диафрагмой,м
p := 2.5
L_1 := 1.5
# Температура пара С
# Смещение оси диафрагмы  относительно оси трубопровода, мм
t := 380
e_x := 1.0
# Перепад давления на диафрагме, кПа | Толщина диска диафрагмы, мм
Δp := 16
E_д := 4.5
# Тип Диафрагмы - С фланцевым отбором Δp
# Высота уступа  на участке трубопровода перед диафрагмой, мм
h := 1.0
# Материал трубопровода - Сталь
# Тип датчика измерения перепада давления на диафрагме
# Состояние внутренней поверхности трубопровода - новая | Метран 100 ДД-1430
# Тип датчика измерения перепада абсолютного  давления на диафрагме
# Метран 100 ДА-1060
# Тип Датчика температуры пара | ТСПУ Метран 276
# Тип показывающих приборов | Метран -620
# [area: Результаты расчета расхода пара]
# Вопрос расчета коэффициента?????
a_e := 15.6
b_e := 8.3
c_e := 6.5
γ(x) := 10^-6*(a_e + 10^-3*x*b_e - 10^-6*x^2*c_e)
# Диаметр паропровода при 75 С D, мм
D := D_20*(1 + γ(t)*(t - 20)) = 100.641
# Диаметр отверстия  диафрагмы  при 75 С d, мм
k1 := (24.39 - 23.32)/(400 - 375) = 0.0428
d := d_20*(1 + γ(t)*(t - 20)) = 69.4425
y(x) := k1*x + 7.28
# Относительный диаметр отверстия диафрагмы β
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β := d/D = 0.69
# Плотность  пара при рабочих  условиях ρ, кг/м3
P := p*10.197 = 25.4925
ρ := 8.446
# Вязкость пара  при  рабочих условиях Па*с
p = 2.5
t = 380
o := 23.53*10^-6
# ΔТаблица | Показатель адиабаты k
# 20 град | Амиак
k := 1.31
# Коэффициент скорости входа Е
L_2 := 0
E := 1/sqrt(1 - β^4) = 1.13715
L_1 = 1.5
L_2 := 25.4/D
# Коэффициент  истечения  при  числе Рейнольдса
L_1 := 25.4/D
C := 0.5959 + 0.0312*β^2.1 - 0.1840*β^8 + 0.090*L_1*β^4*(1 - β^4)^-1 - 0.0337*L_2*β^3 = 0.604623
# Эквивалентная  шероховатость  трубопровода Rш, мм
# ΔТаблица | Новая бесшовная прокатная/горячетянутая
R_ш := 0.1
r_0 := 0.07*log(R_ш/D*10^4) - 0.04 = 0.0298056
A_re := 0.5  # Константа при выполнении условий
# Поправка на влияние шероховатости стенки ИТ
K_ш := 1 + β^4*r_0*A_re = 1.00338
# Поправка на притупление входной кромки диаграммы
τ_пп := 2
r_н0 := 0.05
r_k := 0.195 - (0.195 - r_н0)*(1 - e^(-τ_пп/3))*(3/τ_пп) = 0.0891682
K_п := 1.0547 - 0.0575*e^(-149*r_k/d) = 1.00721
# Коэффициент расширения среды ε
ε := 1 - (0.41 + 0.35*β^4)*Δp*10^3/(k*p*10^6) = 0.997609
# Массовый расход
q_m := E*C*K_ш*K_п*ε*(π*(d*10^-3)^2/4)*(2*ρ*Δp*10^3)^(1/2) = 1.36487
# Число Рейнольдса
RE := 4*q_m/(π*D*10^-3*o) = 733841
# Поправка  на конечность числа Рейнольдса Re
K_RE := 1 + 1.426/(1 + C*RE^0.75/(64.28*β^2.5)) = 1.00239
# Действительное число Рейнольдса
re := K_RE*RE = 735593
# Коэффициент Аre
Are :=
    1 - (log(RE) - 6)^2/4
    1 if RE > 10^6
    = 0.995484
K_ш1 := 1 + β^4*r_0*Are = 1.00673
# Действительный массовый расход
Q_re := q_m*K_RE*K_ш1 = 1.37733
# Минимальная потребная длина  прямолинейного  трубопровода  от задвижки до диафрагмы
b_k := 0
c_k := 0
# Струевыпрямитель
a_d := 22
L_k1 := (a_d + b_k*β^c_k)*10^-1 = 2.2
# Минимальная потребная длина  прямолинейного  трубопровода  за  диафрагмой
b_k2 := 8.55
c_k2 := 0.55
a_d2 := 0
L_k2 := (a_d2 + b_k2*β^c_k2)*10^-1 = 0.697161
# [area: Расчет погрешности  определения расхода]
# Методическая (неисключенная систематическая ) погрешность, обусловленная  недостаточной длинной  прямолинейного участка ИТ до диафрагмы δL,%
δ_L := (0.8 + 19.2*(L_1/L_k1)^4)^-1 = 1.24483
# Методическая (неисключенная систематическая ) погрешность, обусловленная  наличием уступа перед диафрагмой δh,%
δ_h1 := 0.2
δ_h := 0
# Методическая (неисключенная систематическая ) погрешность, обусловленная  смещением  оси диафрагмы относительно оси ИТ δex,%
0.0025*D/(0.1 + 2.3*β^4) = 0.404934
δ_ex1 :=
    0.3 if 0.0025*D/(0.01 + 2.3*β^4) < e_x < 0.005*D/(0.01 + 2.3*β^4)
    0 otherwise
    = 0
0.005*D/(0.001 + 2.3*β^4) = 0.963363
δ_ex := 0.3
# Методическая (неисключенная систематическая ) погрешность, обусловленная  недостаточной  толщиной  диска диафрагмы δE,%
Δp_в := 40*10^3  # верхний предел  перепада  давления на диафрагме
σ_m := 1  # предел текучести  материала диафрагмы при рабочей температуре
E_Дmin := D*(Δp_в/σ_m*(0.681 - 0.651*β))^0.5 = 9691.09
a := β*(13.5 - 15.5*β) = 1.93545
b := 117 - 106*β^1.9 = 64.6256
E_y := E  # модуль упругости  материала диафрагмы,Па
# не понятно/не совпало
δ_E := Δp_в/E_y*D^2/E^2*(a*D/E - b) = 2.93895e10
δ_E := 0
# Методическая (неисключенная систематическая ) погрешность, обусловленная  недоставерными данными о степени шероховатости трубопровода δш,%
δ_ш := (K_ш1 - 1)*100 = 0.672557
K_ш = 1.00338
# Методическая (неисключенная систематическая ) погрешность, обусловленная  недоставерными данными о степени шероховатости трубопровода δш,%
δ_к := (K_п - 1)*100 = 0.721279
K_п = 1.00721
δ_C0 := β = 0.69
δ_C := ((δ_C0 + δ_L + δ_h + δ_ex + δ_E)^2 + δ_ш^2 + δ_к^2)^0.5 = 2.44275
# Неисключенная систематическая погрешность определения D
δ_D := 0.4
# Неисключенная систематическая погрешность определения d
δ_d := 0.07
# Методическая погрешность коэффициента расширения ε
δ_ε0 := 4*Δp*10^3/(p*10^6) = 0.0256
ε = 0.997609
δ_ε := (δ_ε0^2 + ((ε - 1)/ε)^2*δ_к^2)^0.5 = 0.0256583
# Предельная допускаемая погрешность  датчика  разности давления
δ_Δp1 := 0.29
# Верхний предел определения разности давления
Δp_max := 40*10^3
# Случайная составляющая  погрешность  датчика  разности давления
δ_δp1 := 0
# Предельная допускаемая погрешность  датчика  абсолютного  давления
δ_aΔp1 := 0.34
# Верхний предел определения абсолютного давления
Δp_Amax := 16*10^6
# Случайная составляющая  погрешность  датчика  абсолютного давления
δ_Aδp1 := 0
# Предельная допускаемая погрешность  датчика температуры
δ_t1 := 0.25
# Пределы измерения температуры
t2 := 600
t1 := 0
Δt := t2 - t1 = 600
# Случайная составляющая  погрешность  датчика температуры
δ_δt1 := 0
# Предельная допустимая погрешность автономного индикатора
δ_Δp2 := 0.7
δ_p2 := 0.7
δ_t2 := 0.7
# Случайная составляющая  погрешность автономного индикатора
δ_δp2 := 0
δ_δp22 := 0
δ_δt2 := 0
# Суммарная неисключенная систематическая  составляющая погрешности  измерения перепада  давления
y1 := Δp*10^3 = 16000
y_max := Δp_max = 40000
δ_y1 := δ_Δp1 = 0.29
δ_y2 := δ_Δp2 = 0.7
δ_ΔP := ((y1/y_max*δ_y1)^2 + δ_y2^2)^0.5 = 0.709546
δ_ΔP := ((y_max/y1*δ_y1)^2 + δ_y2^2)^0.5 = 1.00778
# Суммарная неисключенная систематическая  составляющая погрешности  измерения абсолютного  давления
y2 := p*10^6 = 2500000
y_max2 := Δp_Amax = 16000000
δ_y12 := δ_aΔp1 = 0.34
δ_y22 := δ_p2 = 0.7
δ_P2 := ((y2/y_max2*δ_y12)^2 + δ_y22^2)^0.5 = 0.702013
δ_P2 := ((y_max2/y2*δ_y12)^2 + δ_y22^2)^0.5  # disabled
# Суммарная случайная составляющая
δ_δp2 = 0
δ_δp1 = 0
ν_p := 1
δ_Σδp2 := ν_p*δ_δp2 = 0
δ_Σδp1 := ν_p*δ_δp1 = 0
# Суммарная составляющая погрешности измерения температуры
δ_Σδt1 := ((t/Δt*δ_t1)^2 + δ_t2^2)^0.5 = 0.717683
δ_Σδt1 := 1.15
# Коэффициент  влияния температуры на плотность
ν := 1
# Коэффициент  влияния давления на плотность
ν_p := 1
# Суммарная  случайная составляющая  погрешности измерения температуры
δ_Σt := 100*((t2 - t1)/(273.15 + t))*δ_δt1/(t2 - t1) = 0
# Погрешность определения плотнорсти
δ_ρc := 0
δ_x := 0
δ_ρ0 := 0
δ_ρ := (δ_ρ0^2 + (ν_p*δ_P2)^2 + (ν*δ_Σδt1)^2 + δ_ρc^2 + δ_x^2)^0.5 = 1.34734
# Cлучайная Погрешность определения плотнорсти
δ_δρ := (δ_ρ0^2 + (ν_p*δ_δp2)^2 + (ν*δ_Σt)^2 + δ_ρc^2 + δ_x^2)^0.5 = 0
# Неисключенная систематическая составляющая погрешности определения расхода
δ_ε = 0.0256583
δ_C = 2.44275
δ_q := (δ_C^2 + (2*β^4/(1 - β^4))^2*δ_D^2 + (2/(1 - β^4))^2*δ_d^2 + δ_ε^2 + 0.25*(δ_ρ^2 + δ_ΔP^2))^0.5 = 2.60061
δ_δq := (0.25*(δ_δρ^2 + δ_δp1^2) + δ_δp1^2) = 0
δ_qfin := (δ_q^2 + δ_δq)^0.5 = 2.60061
